** Lab 02 membrane input file test
**
** NODES
**
*Node, nset = nglobal
   1,     0.0,     0.0,     0.0
   2,    25.0,     0.0,     0.0
   3,    50.0,     0.0,     0.0
   4,    75.0,     0.0,     0.0
   5,   100.0,     0.0,     0.0
   6,   125.0,     0.0,     0.0
   7,   150.0,     0.0,     0.0
   8,   175.0,     0.0,     0.0
   9,   200.0,     0.0,     0.0
  10,   225.0,     0.0,     0.0
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**
** ELEMENTS
**
*Element, type = M3D4
   1,   1,   2,  43,  42
   2,   2,   3,  44,  43
   3,   3,   4,  45,  44
   4,   4,   5,  46,  45
   5,   5,   6,  47,  46
   6,   6,   7,  48,  47
   7,   7,   8,  49,  48
   8,   8,   9,  50,  49
   9,   9,  10,  51,  50
  10,  10,  11,  52,  51
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**
** MATERIALS
**
*Material, name = material_1
*Elastic
72000.0,  0.33
**
** SETS
**
*Nset, nset = fixed_nodes
   1,  42,  83, 124, 165, 206, 247, 288, 329
*Nset, nset = loaded_nodes_internal
  82, 123, 164, 205, 246, 287, 328
*Nset, nset = loaded_nodes_external
  41, 369
*Elset, elset = plate_1, generate
   1, 320,   1
**
** LOCAL ORIENTATION
**
*orientation, name = local_orientation
1.0, 0.0, 0.0, 0.0, 1.0, 0.0
3, 0.0
**
** MEMBRANE PROPERTIES
**
*Membrane Section, elset = plate_1, material = material_1, orientation = local_orientation
 1.5,
**
** STEP
**
*Step, name = step_1
*Static
**
** BOUNDARY CONDITIONS
**
*Boundary
fixed_nodes, ENCASTRE
**
** LOADS
**
*Cload
loaded_nodes_external,  2, 0.25
loaded_nodes_internal,  2, 0.5
**
** FIELD OUTPUT
**
*Output, field, variable=PRESELECT
**
** HISTORY OUTPUT
**
*Output, history, variable=PRESELECT
**
** PRINT RESULTS TO FILE
**
*NODE FILE
U,
RF,
*EL FILE
S,
*End Step
