** Lab 02 input file test
**
** NODES
**
*Node, nset = nglobal
   1,     0.0,     0.0,     0.0
   2,    20.0,     0.0,     0.0
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**
** ELEMENTS
**
*Element, type = S4R
   1,   1,   2,  53,  52
   2,   2,   3,  54,  53
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**
** MATERIALS
**
*Material, name = material_1
*Elastic
72000.0,  0.33
**
** SETS
**
*Nset, nset = fixed_nodes
   1,  52, 103, 154, 205, 256, 307, 358, 409, 460, 511
*Nset, nset = loaded_nodes_internal
 102, 153, 204, 255, 306, 357, 408, 459, 510
*Nset, nset = loaded_nodes_external
  51, 561
*Elset, elset = plate_1, generate
   1, 500,   1
**
** LOCAL ORIENTATION
**
*orientation, name = local_orientation
1.0, 0.0, 0.0, 0.0, 1.0, 0.0
3, 0.0
**
** SHELL PROPERTIES
**
*Shell Section, elset = plate_1, material = material_1, orientation = local_orientation
 1.5,   5
**
** STEP
**
*Step, name = step_1
*Static
**
** BOUNDARY CONDITIONS
**
*Boundary
fixed_nodes, ENCASTRE
**
** LOADS
**
*Cload
loaded_nodes_external,  3, 0.2
loaded_nodes_internal,  3, 0.4
**
** FIELD OUTPUT
**
*Output, field, variable=PRESELECT
**
** HISTORY OUTPUT
**
*Output, history, variable=PRESELECT
**
** PRINT RESULTS TO FILE
**
*NODE PRINT
U,
RF,
*EL PRINT
S,
*End Step
