** Lab 02 input file test
**
** NODES
**
*Node, nset = nglobal
   1,     0.0,     0.0,     0.0
   2,    50.0,     0.0,     0.0
   3,   100.0,     0.0,     0.0
   4,   150.0,     0.0,     0.0
   5,   200.0,     0.0,     0.0
   6,   250.0,     0.0,     0.0
   7,   300.0,     0.0,     0.0
   8,   350.0,     0.0,     0.0
   9,   400.0,     0.0,     0.0
  10,   450.0,     0.0,     0.0
  11,   500.0,     0.0,     0.0
  12,   550.0,     0.0,     0.0
  13,   600.0,     0.0,     0.0
  14,   650.0,     0.0,     0.0
  15,   700.0,     0.0,     0.0
  16,   750.0,     0.0,     0.0
  17,   800.0,     0.0,     0.0
  18,   850.0,     0.0,     0.0
  19,   900.0,     0.0,     0.0
  20,   950.0,     0.0,     0.0
  21,  1000.0,     0.0,     0.0
  22,     0.0,    40.0,     0.0
  23,    50.0,    40.0,     0.0
  24,   100.0,    40.0,     0.0
  25,   150.0,    40.0,     0.0
  26,   200.0,    40.0,     0.0
  27,   250.0,    40.0,     0.0
  28,   300.0,    40.0,     0.0
  29,   350.0,    40.0,     0.0
  30,   400.0,    40.0,     0.0
  31,   450.0,    40.0,     0.0
  32,   500.0,    40.0,     0.0
  33,   550.0,    40.0,     0.0
  34,   600.0,    40.0,     0.0
  35,   650.0,    40.0,     0.0
  36,   700.0,    40.0,     0.0
  37,   750.0,    40.0,     0.0
  38,   800.0,    40.0,     0.0
  39,   850.0,    40.0,     0.0
  40,   900.0,    40.0,     0.0
  41,   950.0,    40.0,     0.0
  42,  1000.0,    40.0,     0.0
  43,     0.0,    80.0,     0.0
  44,    50.0,    80.0,     0.0
  45,   100.0,    80.0,     0.0
  46,   150.0,    80.0,     0.0
  47,   200.0,    80.0,     0.0
  48,   250.0,    80.0,     0.0
  49,   300.0,    80.0,     0.0
  50,   350.0,    80.0,     0.0
  51,   400.0,    80.0,     0.0
  52,   450.0,    80.0,     0.0
  53,   500.0,    80.0,     0.0
  54,   550.0,    80.0,     0.0
  55,   600.0,    80.0,     0.0
  56,   650.0,    80.0,     0.0
  57,   700.0,    80.0,     0.0
  58,   750.0,    80.0,     0.0
  59,   800.0,    80.0,     0.0
  60,   850.0,    80.0,     0.0
  61,   900.0,    80.0,     0.0
  62,   950.0,    80.0,     0.0
  63,  1000.0,    80.0,     0.0
  64,     0.0,   120.0,     0.0
  65,    50.0,   120.0,     0.0
  66,   100.0,   120.0,     0.0
  67,   150.0,   120.0,     0.0
  68,   200.0,   120.0,     0.0
  69,   250.0,   120.0,     0.0
  70,   300.0,   120.0,     0.0
  71,   350.0,   120.0,     0.0
  72,   400.0,   120.0,     0.0
  73,   450.0,   120.0,     0.0
  74,   500.0,   120.0,     0.0
  75,   550.0,   120.0,     0.0
  76,   600.0,   120.0,     0.0
  77,   650.0,   120.0,     0.0
  78,   700.0,   120.0,     0.0
  79,   750.0,   120.0,     0.0
  80,   800.0,   120.0,     0.0
  81,   850.0,   120.0,     0.0
  82,   900.0,   120.0,     0.0
  83,   950.0,   120.0,     0.0
  84,  1000.0,   120.0,     0.0
  85,     0.0,   160.0,     0.0
  86,    50.0,   160.0,     0.0
  87,   100.0,   160.0,     0.0
  88,   150.0,   160.0,     0.0
  89,   200.0,   160.0,     0.0
  90,   250.0,   160.0,     0.0
  91,   300.0,   160.0,     0.0
  92,   350.0,   160.0,     0.0
  93,   400.0,   160.0,     0.0
  94,   450.0,   160.0,     0.0
  95,   500.0,   160.0,     0.0
  96,   550.0,   160.0,     0.0
  97,   600.0,   160.0,     0.0
  98,   650.0,   160.0,     0.0
  99,   700.0,   160.0,     0.0
 100,   750.0,   160.0,     0.0
 101,   800.0,   160.0,     0.0
 102,   850.0,   160.0,     0.0
 103,   900.0,   160.0,     0.0
 104,   950.0,   160.0,     0.0
 105,  1000.0,   160.0,     0.0
 106,     0.0,   200.0,     0.0
 107,    50.0,   200.0,     0.0
 108,   100.0,   200.0,     0.0
 109,   150.0,   200.0,     0.0
 110,   200.0,   200.0,     0.0
 111,   250.0,   200.0,     0.0
 112,   300.0,   200.0,     0.0
 113,   350.0,   200.0,     0.0
 114,   400.0,   200.0,     0.0
 115,   450.0,   200.0,     0.0
 116,   500.0,   200.0,     0.0
 117,   550.0,   200.0,     0.0
 118,   600.0,   200.0,     0.0
 119,   650.0,   200.0,     0.0
 120,   700.0,   200.0,     0.0
 121,   750.0,   200.0,     0.0
 122,   800.0,   200.0,     0.0
 123,   850.0,   200.0,     0.0
 124,   900.0,   200.0,     0.0
 125,   950.0,   200.0,     0.0
 126,  1000.0,   200.0,     0.0
**
** ELEMENTS
**
*Element, type = S4R
   1,   1,   2,  23,  22
   2,   2,   3,  24,  23
   3,   3,   4,  25,  24
   4,   4,   5,  26,  25
   5,   5,   6,  27,  26
   6,   6,   7,  28,  27
   7,   7,   8,  29,  28
   8,   8,   9,  30,  29
   9,   9,  10,  31,  30
  10,  10,  11,  32,  31
  11,  11,  12,  33,  32
  12,  12,  13,  34,  33
  13,  13,  14,  35,  34
  14,  14,  15,  36,  35
  15,  15,  16,  37,  36
  16,  16,  17,  38,  37
  17,  17,  18,  39,  38
  18,  18,  19,  40,  39
  19,  19,  20,  41,  40
  20,  20,  21,  42,  41
  21,  22,  23,  44,  43
  22,  23,  24,  45,  44
  23,  24,  25,  46,  45
  24,  25,  26,  47,  46
  25,  26,  27,  48,  47
  26,  27,  28,  49,  48
  27,  28,  29,  50,  49
  28,  29,  30,  51,  50
  29,  30,  31,  52,  51
  30,  31,  32,  53,  52
  31,  32,  33,  54,  53
  32,  33,  34,  55,  54
  33,  34,  35,  56,  55
  34,  35,  36,  57,  56
  35,  36,  37,  58,  57
  36,  37,  38,  59,  58
  37,  38,  39,  60,  59
  38,  39,  40,  61,  60
  39,  40,  41,  62,  61
  40,  41,  42,  63,  62
  41,  43,  44,  65,  64
  42,  44,  45,  66,  65
  43,  45,  46,  67,  66
  44,  46,  47,  68,  67
  45,  47,  48,  69,  68
  46,  48,  49,  70,  69
  47,  49,  50,  71,  70
  48,  50,  51,  72,  71
  49,  51,  52,  73,  72
  50,  52,  53,  74,  73
  51,  53,  54,  75,  74
  52,  54,  55,  76,  75
  53,  55,  56,  77,  76
  54,  56,  57,  78,  77
  55,  57,  58,  79,  78
  56,  58,  59,  80,  79
  57,  59,  60,  81,  80
  58,  60,  61,  82,  81
  59,  61,  62,  83,  82
  60,  62,  63,  84,  83
  61,  64,  65,  86,  85
  62,  65,  66,  87,  86
  63,  66,  67,  88,  87
  64,  67,  68,  89,  88
  65,  68,  69,  90,  89
  66,  69,  70,  91,  90
  67,  70,  71,  92,  91
  68,  71,  72,  93,  92
  69,  72,  73,  94,  93
  70,  73,  74,  95,  94
  71,  74,  75,  96,  95
  72,  75,  76,  97,  96
  73,  76,  77,  98,  97
  74,  77,  78,  99,  98
  75,  78,  79, 100,  99
  76,  79,  80, 101, 100
  77,  80,  81, 102, 101
  78,  81,  82, 103, 102
  79,  82,  83, 104, 103
  80,  83,  84, 105, 104
  81,  85,  86, 107, 106
  82,  86,  87, 108, 107
  83,  87,  88, 109, 108
  84,  88,  89, 110, 109
  85,  89,  90, 111, 110
  86,  90,  91, 112, 111
  87,  91,  92, 113, 112
  88,  92,  93, 114, 113
  89,  93,  94, 115, 114
  90,  94,  95, 116, 115
  91,  95,  96, 117, 116
  92,  96,  97, 118, 117
  93,  97,  98, 119, 118
  94,  98,  99, 120, 119
  95,  99, 100, 121, 120
  96, 100, 101, 122, 121
  97, 101, 102, 123, 122
  98, 102, 103, 124, 123
  99, 103, 104, 125, 124
 100, 104, 105, 126, 125
**
** MATERIALS
**
*Material, name = material_1
*Elastic
72000.0,  0.33
**
** SETS
**
*Nset, nset = fixed_nodes
   1,  22,  43,  64,  85, 106
*Nset, nset = loaded_nodes_internal
  42,  63,  84, 105
*Nset, nset = loaded_nodes_external
  21, 126
*Elset, elset = plate_1, generate
   1, 100,   1
**
** LOCAL ORIENTATION
**
*orientation, name = local_orientation
1.0, 0.0, 0.0, 0.0, 1.0, 0.0
3, 0.0
**
** SHELL PROPERTIES
**
*Shell Section, elset = plate_1, material = material_1, orientation = local_orientation
 1.5,   5
**
** STEP
**
*Step, name = step_1
*Static
**
** BOUNDARY CONDITIONS
**
*Boundary
fixed_nodes, ENCASTRE
**
** LOADS
**
*Cload
loaded_nodes_external,  3, 0.4
loaded_nodes_internal,  3, 0.8
**
** FIELD OUTPUT
**
*Output, field, variable=PRESELECT
**
** HISTORY OUTPUT
**
*Output, history, variable=PRESELECT
**
** PRINT RESULTS TO FILE
**
*NODE FILE
U,
RF,
*EL FILE
S,
*End Step
