** Lab 02 input file test
**
** NODES
**
*Node, nset = nglobal
   1,     0.0,     0.0,     0.0
   2,   200.0,     0.0,     0.0
   3,   400.0,     0.0,     0.0
   4,   600.0,     0.0,     0.0
   5,   800.0,     0.0,     0.0
   6,  1000.0,     0.0,     0.0
   7,     0.0,    40.0,     0.0
   8,   200.0,    40.0,     0.0
   9,   400.0,    40.0,     0.0
  10,   600.0,    40.0,     0.0
  11,   800.0,    40.0,     0.0
  12,  1000.0,    40.0,     0.0
  13,     0.0,    80.0,     0.0
  14,   200.0,    80.0,     0.0
  15,   400.0,    80.0,     0.0
  16,   600.0,    80.0,     0.0
  17,   800.0,    80.0,     0.0
  18,  1000.0,    80.0,     0.0
  19,     0.0,   120.0,     0.0
  20,   200.0,   120.0,     0.0
  21,   400.0,   120.0,     0.0
  22,   600.0,   120.0,     0.0
  23,   800.0,   120.0,     0.0
  24,  1000.0,   120.0,     0.0
  25,     0.0,   160.0,     0.0
  26,   200.0,   160.0,     0.0
  27,   400.0,   160.0,     0.0
  28,   600.0,   160.0,     0.0
  29,   800.0,   160.0,     0.0
  30,  1000.0,   160.0,     0.0
  31,     0.0,   200.0,     0.0
  32,   200.0,   200.0,     0.0
  33,   400.0,   200.0,     0.0
  34,   600.0,   200.0,     0.0
  35,   800.0,   200.0,     0.0
  36,  1000.0,   200.0,     0.0
**
** ELEMENTS
**
*Element, type = S4R
   1,   1,   2,   8,   7
   2,   2,   3,   9,   8
   3,   3,   4,  10,   9
   4,   4,   5,  11,  10
   5,   5,   6,  12,  11
   6,   7,   8,  14,  13
   7,   8,   9,  15,  14
   8,   9,  10,  16,  15
   9,  10,  11,  17,  16
  10,  11,  12,  18,  17
  11,  13,  14,  20,  19
  12,  14,  15,  21,  20
  13,  15,  16,  22,  21
  14,  16,  17,  23,  22
  15,  17,  18,  24,  23
  16,  19,  20,  26,  25
  17,  20,  21,  27,  26
  18,  21,  22,  28,  27
  19,  22,  23,  29,  28
  20,  23,  24,  30,  29
  21,  25,  26,  32,  31
  22,  26,  27,  33,  32
  23,  27,  28,  34,  33
  24,  28,  29,  35,  34
  25,  29,  30,  36,  35
**
** MATERIALS
**
*Material, name = material_1
*Elastic
72000.0,  0.33
**
** SETS
**
*Nset, nset = fixed_nodes
   1,   7,  13,  19,  25,  31
*Nset, nset = loaded_nodes_internal
  12,  18,  24,  30
*Nset, nset = loaded_nodes_external
   6,  36
*Elset, elset = plate_1, generate
   1,  25,   1
**
** LOCAL ORIENTATION
**
*orientation, name = local_orientation
1.0, 0.0, 0.0, 0.0, 1.0, 0.0
3, 0.0
**
** SHELL PROPERTIES
**
*Shell Section, elset = plate_1, material = material_1, orientation = local_orientation
 1.5,   5
**
** STEP
**
*Step, name = step_1
*Static
**
** BOUNDARY CONDITIONS
**
*Boundary
fixed_nodes, ENCASTRE
**
** LOADS
**
*Cload
loaded_nodes_external,  3, 0.4
loaded_nodes_internal,  3, 0.8
**
** FIELD OUTPUT
**
*Output, field, variable=PRESELECT
**
** HISTORY OUTPUT
**
*Output, history, variable=PRESELECT
**
** PRINT RESULTS TO FILE
**
*NODE FILE
U,
RF,
*EL FILE
S,
*End Step
